# This is the supplement to the paper by Konstantin Rybakov (rkoffice@mail.ru)
# "Spectral Representation and Simulation of Fractional Brownian Motion"
# (Computation 2025, 13(1), 19. https://doi.org/10.3390/computation13010019)
#
# Abstract. The paper gives a new representation for the fractional Brownian motion
# that can be applied to simulate this self-similar random process in continuous time.
# Such a representation is based on the spectral form of mathematical description and
# the spectral method. The Legendre polynomials are used as the orthonormal basis.
# The paper contains all the necessary algorithms and their theoretical foundation,
# as well as the results of numerical experiments.
# Time horizon
T := 1
# Legendre polynomials (recurrence relations)
_p(i, t) :=
    1 if i ≤ 0
    1/i*((2*i - 1)*(2*t/T - 1)*_p(i - 1, t) - (i - 1)*_p(i - 2, t)) otherwise
p(i, t) := sqrt((2*i + 1)/T)*_p(i, t)
pt(L, t) :=
    for i ∈ 0 .. L - 1
        c[0] ← 1 if i == 0
        c[1] ← 2*t/T - 1 if i == 1
        c[i] ← 1/i*((2*i - 1)*(2*t/T - 1)*c[i - 1] - (i - 1)*c[i - 2]) if i > 1
    for i ∈ 0 .. L - 1
        c[i] ← sqrt((2*i + 1)/T)*c[i]
    c
# Spectral characteristic of the power function
spFtα(L, α) := T^α*sqrt(T)*{
    c[0] ← 1/(α + 1)
    for i ∈ 1 .. L - 1
        c[i] ← sqrt((2*i + 1)/(2*i - 1))*(α - i + 1)/(α + i + 1)*c[i - 1]
    c
}
fα(t) == t^α
spF1(L) := sqrt(T)*{
    c[0] ← 1
    for i ∈ 1 .. L - 1
        c[i] ← 0
    c
}
f0(t) == 1
# Spectral characteristic of the multiplication operator with power function as a multiplier
spAtα(L, α) :=
    F ← spFtα(L, α)
    for i ∈ 0 .. L - 1
        for j ∈ 0 .. i
            g ← sum((-1)^(j - k)*if(k > 0, product(((α + m)/m)^2*(j - m + 1)/(α + m - i)*(j + m)/(α + m + i + 1), m = 1 .. k), 1), k = 0 .. j)
            c[i, j] ← sqrt((2*j + 1)/T)*g*F[i]
            c[j, i] ← c[i, j] if i ≠ j
    c
# Spectral characteristic of the fractional integration operator
spID(L, β) :=
    F ← spFtα(L, β)
    for i ∈ 0 .. L - 1
        for j ∈ 0 .. i
            g ← 1/Γ(β + 1)*sum((-1)^(j - k)*if(k > 0, product((β + m)/m*(j - m + 1)/(β + m - i)*(j + m)/(β + m + i + 1), m = 1 .. k), 1), k = 0 .. j)
            c[i, j] ← sqrt((2*j + 1)/T)*g*F[i]
            c[j, i] ← (-1)^(i + j)*c[i, j] if i ≠ j
    c
# Spectral characteristic of the first- and second-order integration operators
spI(L) := T*{
    c[0, 0] ← 1/2
    for m ∈ 1 .. L - 1
        c[m - 1, m] ← -1/(2*sqrt(4*m^2 - 1))
        c[m, m - 1] ← -c[m - 1, m]
    c
}
spI2(L) := T^2*{
    for m ∈ 0 .. L - 1
        c[m, m] ←
            1/6 if m == 0
            -1/(2*(2*m - 1)*(2*m + 3)) otherwise
        if m > 0
            c[m - 1, m] ← -1/(4*sqrt(3)) if m == 1
            c[m, m - 1] ← -c[m - 1, m]
        if m > 1
            c[m - 2, m] ← 1/(4*sqrt((4*(m - 1)^2 - 1)*(4*m^2 - 1)))
            c[m, m - 2] ← c[m - 2, m]
    c
}
I2 == I^2
# Spectral characteristic of the linear integral operator defining the fractional Brownian motion
B(x, y) := Γ(x)*Γ(y)/Γ(x + y)
spKH(L, H) :=
    spI(L) if H == 1/2
    sqrt(2*H/((1 - 2*H)*B(1 - 2*H, H + 1/2)))*Γ(H + 1/2)*spID(L, 2*H)*spAtα(L, 1/2 - H)*spID(L, 1/2 - H)*spAtα(L, H - 1/2) if H < 1/2
    sqrt(H*(2*H - 1)/B(2 - 2*H, H - 1/2))*Γ(H - 1/2)*spI(L)*spAtα(L, H - 1/2)*spID(L, H - 1/2)*spAtα(L, 1/2 - H) if H > 1/2
# Two-dimensional spectral characteristic of the covariance function
spSH(L, H) :=
    F1 ← spF1(L)
    Ft2H ← spFtα(L, 2*H)
    I ← spI2(L) if H == 1/2
    I ← spID(L, 2*H + 1) otherwise
    (Ft2H*transpose(F1) + F1*transpose(Ft2H) - Γ(2*H + 1)*I - Γ(2*H + 1)*transpose(I))/2
# Spectral characteristic of the Gaussian white noise
spGWN(L) := rnorm(L, 0, 1)
# Hurst index and truncation order
H := 0.5
L := 64
# Simulation of fractional Brownian motion
spInvert(t, F) := transpose(F)*pt(rows(F), t)
spBH := spKH(L, H)*spGWN(L)
BH(t) := spInvert(t, spBH)
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# Approximation errors
N2RH := T^(4*H + 2)/4*((4*H + 3)/((2*H + 1)*(4*H + 1)) - 4*Γ(2*H + 1)^2/Γ(4*H + 3)) = 0.166667
m2(M) := tr(M*transpose(M))
i := 0 .. 6
L[i] := 2^(i + 2)
transpose(L) = [4, 8, 16, 32, 64, 128, 256]
ε[i] :=
    A ← spSH(L[i], H)
    B ← spKH(L[i], H)
    sqrt(N2RH - m2(A) + m2(A - B*transpose(B)))
transpose(ε) = [0.0140859, 0.00434208, 0.00145145, 0.000500205, 0.000174698, 6.13964e-5, 2.16427e-5]
ε1[i] := sqrt(N2RH - m2(spSH(L[i], H)))
transpose(ε1) = [0.0135154, 0.00422996, 0.00143073, 0.000496466, 0.00017403, 6.12778e-5, 2.16217e-5]
